# HOW TO RUN:
# lmp.exe -v F [DAT FILE WITHOUT equilibrated.dat] -i [LAMMPS SCRIPT] -v M [# matrix chains]
# lmp.exe -v F .\Tr4_200_10_8N1000NC9rho0.85 -i .\in.production.rod.springs -v M 9

echo            none

units           lj
atom_style      bond
special_bonds   fene

newton on

variable T equal 1.0
variable L equal 2.0 # BOX SIZE
variable FOLDER string "output"
variable rho equal 1.1
variable Ea equal 0.0
variable Ee equal 10.0
variable MG equal 2.0
boundary        p p p

region box block 0 4 0 4 0 4
create_box 1 box bond/types 1 extra/special/per/atom 1 extra/bond/per/atom 1

create_atoms 1 single 2.285 2.285 2.285
create_atoms 1 single 1.715 1.715 1.715

mass 1 1.0

log ${FOLDER}/TwoParticlesBondCreateDestroyMCrho${rho}Ea${Ea}Ee${Ee}MG${MG}L$L.log

neighbor        0.6 bin
neigh_modify    every 1 delay 1 check yes
comm_modify     vel yes
comm_modify cutoff 2.0

bond_style      fene
bond_coeff      1 30.0 1.5 1.0 1.0  # Original Kremer-Grest

print           ""
print       "*****************************************************"
print       "PRODUCTION: Full LJ (WCA) potential, t=1e9 tau"
print       "*****************************************************"
pair_style lj/cut 1.122462048
pair_modify     shift yes
pair_coeff  * * 1.0 1.0 1.122462048

timestep        0.01

#fix 1 all nve
#fix 2 all langevin $T $T 2.0 48279 zero yes # Remove box COM motion by random force

fix 4 all bond/create/destroy/MC 100 1 1 1.0 1 imax 1 jmax 1 energies ${Ea} ${Ee} $T 4893483 FENE 30.0 1.5 LJ 1.0 1.0 Rmin 0.9678598275 maxG ${MG}

thermo 100
thermo_style custom step temp ebond epair etotal press bonds f_4[1] f_4[2] f_4[3] f_4[4] f_4[5]
thermo_modify norm no flush yes
dump            coord all custom 100 ${FOLDER}/TwoParticlesBondCreateDestroyMCrho${rho}Ea${Ea}Ee${Ee}MG${MG}L$L.lammpstrj.gz id x y z
dump_modify coord sort id

reset_timestep 0
run 1000
